P := 8
R := 2
Eg := 0.045
Kg := 0.01
b := 14
T := 40
Rg := 10^4
fv := 18*10^3
Ke := sqrt(P*R)/Eg = 88.8889
F := 0.15/Kg = 15
m := 10^(14/20) = 5.01187
Ket := Ke*F*m*2 = 13365
n := ln(Ket)/ln(35) = 2.67214
Rvh := 7*Rg = 70000
Unm := sqrt(2*P*R) = 5.65685
Ikm := Unm/R = 2.82843
E0r := 2*(Unm + 2) = 15.3137
E00 := 1.1*E0r = 16.8451
E0 := 17
Pk45 := E0^2/(4*π^2*R) = 3.66023
H2145 := P/0.02 = 400
Pkd := 1.1*Pk45 = 4.02625
Ikd := Ikm*1.1 = 3.11127
Uke := 1.1*E0 = 18.7
fh21 := 2*fv = 36000
Rtks1 := (135 - 40)/Pk45 - 15.6 = 10.3547
Rtks2 := (150 - 40)/Pk45 - 15.6 = 14.4528
S1 := 1400/Rtks1 = 135.205
S2 := 1400/Rtks2 = 96.8672
I0 := Ikm/π = 0.900316
P0 := I0*E0 = 15.3054
eta := P/P0*100 = 52.2692
Rvh := (1 + H2145)*R = 802
