P := 12
R := 6
Eg := 0.020
Kg := 0.015
b := 14
T := 40
Rg := 5*10^3
Ke := sqrt(P*R)/Eg = 424.264
F := 0.15/Kg = 10
m := 10^(14/20) = 5.01187
Ket := Ke*F*m*2 = 42527.1
n := ln(Ket)/ln(35) = 2.99771
Rvh := 7*Rg = 35000
